// COMSOL Multiphysics 5.1.0.136 model "3.mph"
// 2
// Untitled\n\n
// Outline of the model tree

Parameters
  NC_d = 2
  OXH = 10
  NC_i = 2
  MGH = 10
  L_NC = 7
  W_NC = 1
  Edge = 5
  OXOFFSET = 2

Geometry
  geom1 "Geometry 1" (2D, length unit nm)
    1: Circle | pos = {-12, 0}; type = solid; base = center; r = NC_d/2
    2: Circle | pos = {-8, 0}; type = solid; base = center; r = NC_d/2
    3: Circle | pos = {-4, 0}; type = solid; base = center; r = NC_d/2
    4: Circle | pos = {0, 0}; type = solid; base = center; r = NC_d/2
    5: Circle | pos = {4, 0}; type = solid; base = center; r = NC_d/2
    6: Circle | pos = {8, 0}; type = solid; base = center; r = NC_d/2
    7: Circle | pos = {12, 0}; type = solid; base = center; r = NC_d/2
    NC: Union | input = 1, 2, 3, 4, 5, 6, 7
    r1: Rectangle | pos = {0, OXOFFSET}; base = center; size = {(NC_d+NC_i)*L_NC+Edge, OXH}
    r2: Rectangle | pos = {0, OXOFFSET+MGH/2+OXH/2}; base = center; size = {(NC_d+NC_i)*L_NC+Edge, MGH}
    r3: Rectangle | pos = {0, OXOFFSET-MGH/2-OXH/2}; base = center; size = {(NC_d+NC_i)*L_NC+Edge, MGH}
    fin: Finalize "Form Union"

Materials
  mat1: Common "NC" on domains 3-10
    def "Basic"
      dL = (dL(T[1/K])-dL(Tempref[1/K]))/(1+dL(Tempref[1/K]))
      CTE = CTE(T[1/K])[1/K]
      thermalconductivity = k_solid_1(T[1/K])[W/(m*K)]
      resistivity = res_solid_1(T[1/K])[ohm*m]
      relpermittivity = 1e4
      thermalexpansioncoefficient = (alpha(T[1/K])[1/K]+(Tempref-293[K])*if(abs(T-Tempref)>1e-3,(alpha(T[1/K])[1/K]-alpha(Tempref[1/K])[1/K])/(T-Tempref),d(alpha(T[1/K]),T)[1/K]))/(1+alpha(Tempref[1/K])[1/K]*(Tempref-293[K]))
      heatcapacity = C_solid_1(T[1/K])[J/(kg*K)]
      HC = HC_solid_1(T[1/K])[J/(mol*K)]
      electricconductivity = sigma_solid_1(T[1/K])[S/m]
      density = rho(T[1/K])[kg/m^3]
      VP = VP_solid_1(T[1/K])[Pa]
      dL: Piecewise
        arg = T
        extrap = constant
        pieces = 
          {0.0, 92.0, -0.003245794-2.191545E-7*T^1+9.931873E-8*T^2-3.27165E-10*T^3+4.101526E-13*T^4}
          {92.0, 1003.0, -0.003767805+1.179943E-5*T^1+3.792275E-9*T^2-5.959619E-13*T^3}
      CTE: Piecewise
        arg = T
        extrap = constant
        pieces = 
          {86.0, 200.0, 4.040319E-6+1.106436E-7*T^1-4.389255E-10*T^2+5.990814E-13*T^3}
          {200.0, 1003.0, 1.237291E-5+5.169284E-9*T^1-5.528527E-14*T^2}
      k_solid_1: Piecewise
        arg = T
        extrap = constant
        pieces = 
          {0.0, 14.0, 496.8118*T^1+41.00857*T^2-10.46095*T^3+0.5579006*T^4-0.009429161*T^5}
          {14.0, 45.0, 7977.526-554.7566*T^1+14.56751*T^2-0.1468484*T^3+3.231278E-4*T^4}
          {45.0, 85.0, 3568.586-199.4435*T^1+5.171042*T^2-0.06880706*T^3+4.612091E-4*T^4-1.23215E-6*T^5}
          {85.0, 1338.0, 330.6431-0.02536626*T^1-8.191375E-5*T^2+6.792908E-8*T^3-2.15362E-11*T^4}
      res_solid_1: Piecewise "Piecewise 1a"
        arg = T
        extrap = constant
        pieces = 
          {1.0, 25.0, 2.194815E-10+1.027514E-12*T^1-3.409278E-13*T^2+3.010164E-14*T^3}
          {25.0, 60.0, 1.390641E-9-1.228888E-10*T^1+4.182944E-12*T^2-2.773737E-14*T^3}
          {60.0, 400.0, -2.210068E-9+9.057611E-11*T^1-4.632985E-14*T^2+6.950205E-17*T^3}
          {400.0, 1338.0, -1.145028E-9+7.877041E-11*T^1-4.720065E-16*T^2+1.275961E-17*T^3}
      alpha: Piecewise
        arg = T
        extrap = constant
        pieces = 
          {0.0, 74.0, 1.109296E-5+4.023822E-8*T^1-2.476496E-10*T^2+7.218616E-13*T^3-7.164369E-16*T^4}
          {74.0, 133.0, 1.221837E-5+1.15298E-8*T^1-1.573678E-11*T^2}
          {133.0, 1003.0, 1.310696E-5+2.762787E-9*T^1}
      C_solid_1: Piecewise "Piecewise 1b" | arg = T; extrap = constant; pieces = {293.0, 1338.0, 399352.2*T^-2+114.8987+0.03228805*T^1}
      HC_solid_1: Piecewise "Piecewise 1c" | arg = T; extrap = constant; pieces = {293.0, 1338.0, 78659.2*T^-2+22.63126+0.00635968*T^1}
      sigma_solid_1: Piecewise "Piecewise 1d"
        arg = T
        extrap = constant
        pieces = 
          {1.0, 25.0, 1/(3.010164E-14*T^3-3.409278E-13*T^2+1.027514E-12*T+2.194815E-10)}
          {25.0, 60.0, 1/(-2.773737E-14*T^3+4.182944E-12*T^2-1.228888E-10*T+1.390641E-09)}
          {60.0, 400.0, 1/(6.950205E-17*T^3-4.632985E-14*T^2+9.057611E-11*T-2.210068E-09)}
          {400.0, 1338.0, 1/(1.275961E-17*T^3-4.720065E-16*T^2+7.877041E-11*T-1.145028E-09)}
      rho: Piecewise
        arg = T
        extrap = constant
        pieces = 
          {0.0, 86.0, 19471.18+0.1076816*T^1-0.00817626*T^2+3.830366E-5*T^3-7.266799E-8*T^4}
          {86.0, 1003.0, 19501.44-0.6933844*T^1-2.041944E-4*T^2+4.297982E-8*T^3}
      VP_solid_1: Piecewise "Piecewise 1e" | arg = T; extrap = constant; pieces = {293.0, 1337.0, (exp((-1.934300e+004/T-7.479000e-001*log10(T)+1.203281e+001)*log(10.0)))*1.333200e+002}
    Enu "Young's modulus and Poisson's ratio"
      youngsmodulus = E(T[1/K])[Pa]
      poissonsratio = nu(T[1/K])
      E: Piecewise
        arg = T
        extrap = constant
        pieces = 
          {0.0, 93.0, 8.190431E10-2.049635E7*T^1-8937.063*T^2}
          {93.0, 293.0, 8.249999E10-3.153455E7*T^1+48127.92*T^2-72.49967*T^3+0.02725845*T^4}
          {293.0, 1280.0, 7.736733E10+425187.2*T^1-20070.07*T^2}
      nu: Piecewise | arg = T; extrap = constant; pieces = {293.0, 1280.0, 0.4403494+8.884688E-6*T^1-1.158876E-8*T^2+1.023495E-11*T^3}
    KG "Bulk modulus and shear modulus"
      K = kappa(T[1/K])[Pa]
      G = mu(T[1/K])[Pa]
      mu: Piecewise | arg = T; extrap = constant; pieces = {293.0, 1280.0, 2.682905E10+142041.4*T^1-7037.486*T^2}
      kappa: Piecewise | arg = T; extrap = constant; pieces = {293.0, 1280.0, 2.224306E11-913189.7*T^1-37420.01*T^2}
  mat2: Common "HfO2" on domains 2
    def "Basic"
      relpermittivity = 25
      electricconductivity = 1e-15
      thermalconductivity = 0.8
      density = 9.68e3
      heatcapacity = 120
      thermalexpansioncoefficient = 6e-6
  mat3: Common "Highly Doped Silicon" on domains 1
    def "Basic"
      relpermeability = 1
      electricconductivity = 2.5e4[S/m]
      thermalexpansioncoefficient = 2.6e-6[1/K]
      heatcapacity = 700[J/(kg*K)]
      relpermittivity = 11.7
      density = 2329[kg/m^3]
      thermalconductivity = 130[W/(m*K)]
    Enu "Young's modulus and Poisson's ratio"
      youngsmodulus = 170e9[Pa]
      poissonsratio = 0.28
    RefractiveIndex
      n = 3.48
      ki = 0
  mat4: Common "BD HfO2" (disabled) on no domains
    def "Basic"
      electricconductivity = 1.42857
      relpermittivity = 25
      thermalconductivity = 0.8
      density = 8.68e3
      heatcapacity = 120

Physics
  es: Electrostatics on all domains
    dependent variable V
    ccn1: ChargeConservation (default)
    zc1: ZeroCharge (default)
    init1: init "Initial Values 1" (default)
    gnd1: Ground on boundaries 2
    pot1: ElectricPotential on boundaries 7 | V0 = 4
    sfcd1: SurfaceChargeDensity on selection geom1_NC_bnd | rhoqs = -0.0255

Mesh
  mesh1 "Mesh 1" (physics-controlled)
    size: MeshSizeDefault | hauto = 2

Studies
  std1 "Study 1"
    stat: Stationary

Solver configurations
  sol1 "Solution 1" (study std1)
    v1: Variables "Dependent Variables 1"
    s1: Stationary "Stationary Solver 1"
      dDef: Direct
      fc1: FullyCoupled | linsolver = dDef

Datasets
  dset1: Solution | solution = sol1

Plots
  pg1: PlotGroup2D "Electric Potential (ec)" | data = dset1
    surf1: Surface | expr = V
  pg2: PlotGroup2D "2D Plot Group 2" | data = dset1
    surf1: Surface | data = dset1; expr = es.normE